# -*- coding: utf-8 -*-
"""
Step 6: we are showing how to add collision detection
and contact management in our project.

The important component to see in the graph are:
- the ones added by the addContact function
- the one in the "Collision" part of the tripod object
- the one in the "Collision" part of the Sphere object
"""
import Sofa
from splib3.constants import Key
from stlib3.physics.rigid import Sphere
from stlib3.scene.contactheader import ContactHeader
from stlib3.scene import Scene
from tripod import Tripod
from tripodcontroller import TripodController


class JumpController(Sofa.Core.Controller):
    """This controller has two roles:
       - if the user presses up/left/right/down/plus/minus, the servomotor angle
         is changed.
       - if the user presses A, an animation is started to move the servomotor to the initial position
         of the real robot.
    """
    def __init__(self, *args, **kwargs):
        # These are needed (and the normal way to override from a python class)
        Sofa.Core.Controller.__init__(self, *args, **kwargs)
        self.stepsize = 0.1
        self.actuators = kwargs["actuators"]

    def onKeypressedEvent(self, event):
        key = event['key']
        self.animateTripod(key)

    def animateTripod(self, key):
        apos = None
        if key == Key.Z:
            apos = -3.14/4
        if key == Key.Q:
            apos = -3.14/3

        if apos is not None:
            for actuator in self.actuators:
                actuator.ServoMotor.angleIn = apos


def createScene(rootNode):

    scene = Scene(rootNode, gravity=[0., -9810., 0.], dt=0.01, plugins=["SofaSparseSolver", 'SofaBoundaryCondition', 'SofaDeformable', 'SofaEngine', 'SofaGeneralRigid', 'SofaMiscMapping', 'SofaGraphComponent', 'SofaGeneralAnimationLoop', 'SofaGeneralEngine'], iterative=False)

    ContactHeader(rootNode, alarmDistance=15, contactDistance=0.5, frictionCoef=0.2)

    # Adding contact handling
    scene.addMainHeader()
    scene.addObject('AttachBodyButtonSetting', stiffness=10)  # Set mouse spring stiffness
    scene.addObject('DefaultVisualManagerLoop')
    scene.VisualStyle.displayFlags = "showCollisionModels"

    tripod = scene.Modelling.addChild(Tripod())
    tripod.addCollision()
    scene.Simulation.addObject('GenericConstraintCorrection')

    # The regular controller that is being used for the last 2 steps
    controller = scene.addObject(TripodController(name="TripodController", actuators=[tripod.ActuatedArm0, tripod.ActuatedArm1, tripod.ActuatedArm2]))
    # You can set the animation from the python script by adding this call
    controller.initTripod('A')

    # The additionnal controller that add two predefined positions for the three servomotors
    scene.addObject(JumpController(name="JumpController", actuators=[tripod.ActuatedArm0, tripod.ActuatedArm1, tripod.ActuatedArm2]))

    sphere = Sphere(scene.Simulation, translation=[0.0, 50.0, 0.0],
                       uniformScale=13.,
                       totalMass=0.032,
                       isAStaticObject=True)
    sphere.addObject('UncoupledConstraintCorrection')

    scene.Simulation.addChild(tripod.RigidifiedStructure)

    motors = scene.Simulation.addChild("Motors")
    for i in range(3):
        motors.addChild(tripod.getChild('ActuatedArm'+str(i)))

    # Temporary additions to have the system correctly built in SOFA
    # Will no longer be required in SOFA v22.06
    scene.Simulation.addObject('MechanicalMatrixMapper',
                                 name="mmmFreeCenter",
                                 template='Vec3,Rigid3',
                                 object1="@RigidifiedStructure/DeformableParts/dofs",
                                 object2="@RigidifiedStructure/FreeCenter/dofs",
                                 nodeToParse="@RigidifiedStructure/DeformableParts/ElasticMaterialObject")

    for i in range(3):
        scene.Simulation.addObject('MechanicalMatrixMapper',
                                   name="mmmDeformableAndArm" + str(i),
                                   template='Vec1,Vec3',
                                   object1="@Modelling/Tripod/ActuatedArm" + str(i) + "/ServoMotor/Articulation/dofs",
                                   object2="@Simulation/RigidifiedStructure/DeformableParts/dofs",
                                   skipJ2tKJ2=True,
                                   nodeToParse="@Simulation/RigidifiedStructure/DeformableParts/ElasticMaterialObject")

        scene.Simulation.addObject('MechanicalMatrixMapper',
                                   name="mmmArms" + str((i + 1) % 3) + str(i),
                                   template='Vec1,Vec1',
                                   object1="@Modelling/Tripod/ActuatedArm" + str(i) + "/ServoMotor/Articulation/dofs",
                                   object2="@Modelling/Tripod/ActuatedArm" + str((i + 1) % 3) + "/ServoMotor/Articulation/dofs",
                                   skipJ1tKJ1=True,
                                   skipJ2tKJ2=True,
                                   nodeToParse="@Simulation/RigidifiedStructure/DeformableParts/ElasticMaterialObject")
