# -*- coding: utf-8 -*-
"""
Step 5: Adding a controller.
The controller will connect user actions to the simulated behaviour.
"""
import Sofa
from stlib3.scene import Scene                   #< Prefab for the scene
from splib3.constants import Key                 #< Constants for keycode
from tripod import Tripod                        #< Prefab for the Tripod
from tripodcontroller import TripodController    #< Implementation of a controller that modify the Tripod

#class MyController(Sofa.Core.Controller):
    #def __init__(self, *args, **kwargs):
        # These are needed (and the normal way to override from a python class)
        #Sofa.Core.Controller.__init__(self, *args, **kwargs)
        #self.actuators = kwargs.get("actuators", [])

    #def onEvent(self, event):
    #    print("event ", event)

    #def onKeypressedEvent(self, event):
        #key = event["key"]
        #if key == Key.plus:
        #    for arm in self.actuators:
        #        arm.angleIn.value += 0.1
        #elif key == Key.minus:
        #    for arm in self.actuators:
        #        arm.angleIn.value -= 0.1

def createScene(rootNode):

    scene = Scene(rootNode, gravity=[0., -9810., 0.], dt=0.01, iterative=False, plugins=["SofaSparseSolver",'SofaDeformable', 'SofaEngine', 'SofaGeneralRigid', 'SofaMiscMapping', 'SofaRigid', 'SofaGraphComponent', 'SofaBoundaryCondition', 'SofaGeneralAnimationLoop', 'SofaGeneralEngine'])
    scene.addMainHeader()
    scene.addObject('DefaultVisualManagerLoop')
    scene.addObject('FreeMotionAnimationLoop')
    scene.addObject('GenericConstraintSolver', maxIterations=50, tolerance=1e-5)
    scene.Simulation.addObject('GenericConstraintCorrection')
    scene.Simulation.TimeIntegrationSchema.rayleighStiffness = 0.005
    scene.Settings.mouseButton.stiffness = 10
    scene.VisualStyle.displayFlags = "showBehavior"

    tripod = Tripod()
    scene.Modelling.addChild(tripod)
    #scene.Modelling.addObject(TripodController(name="TripodController",
    #actuators=[tripod.ActuatedArm0, tripod.ActuatedArm1, tripod.ActuatedArm2]))

    #scene.Modelling.addObject(MyController(name="react-to-keypressed"))

    scene.Simulation.addChild(tripod)

    # Temporary additions to have the system correctly built in SOFA
    # Will no longer be required in SOFA v22.06
    scene.Simulation.addObject('MechanicalMatrixMapper',
                                 name="deformableAndFreeCenterCoupling",
                                 template='Vec3,Rigid3',
                                 object1=tripod["RigidifiedStructure.DeformableParts.dofs"].getLinkPath(),
                                 object2=tripod["RigidifiedStructure.FreeCenter.dofs"].getLinkPath(),
                                 nodeToParse=tripod["RigidifiedStructure.DeformableParts.MechanicalModel"].getLinkPath())

    for i in range(3):
        scene.Simulation.addObject('MechanicalMatrixMapper',
                                   name="deformableAndArm{i}Coupling".format(i=i),
                                   template='Vec1,Vec3',
                                   object1=tripod["ActuatedArm" + str(i) + ".ServoMotor.Articulation.dofs"].getLinkPath(),
                                   object2=tripod["RigidifiedStructure.DeformableParts.dofs"].getLinkPath(),
                                   skipJ2tKJ2=True,
                                   nodeToParse=tripod["RigidifiedStructure.DeformableParts.MechanicalModel"].getLinkPath())
