def createScene(rootNode):
    rootNode.createObject('VisualStyle', displayFlags='showVisualModels showBehaviorModels showCollisionModels showForceFields showInteractionForceFields')
    rootNode.findData('gravity').value='-981.0 0 0';
    rootNode.findData('dt').value="0.01"

    rootNode.createObject('RequiredPlugin', name='SofaMiscCollision')
    rootNode.createObject('RequiredPlugin', name='SofaPython')
    rootNode.createObject('RequiredPlugin', name='SoftRobots')
    rootNode.createObject('OglSceneFrame', style="Arrows", alignment="TopRight")


    ###################################################################
    # Direct simulation
    ###################################################################
    rootNode.createObject('FreeMotionAnimationLoop')
    rootNode.createObject('GenericConstraintSolver', tolerance="1e-6", maxIterations="1000")
    rootNode.createObject('CollisionPipeline')
    rootNode.createObject('BruteForceDetection')
    rootNode.createObject('RuleBasedContactManager', name="Response",
                            response="FrictionContact", rules="0 * FrictionContact?mu=0.8" )
    rootNode.createObject('LocalMinDistance', name="Proximity",
                            alarmDistance="4", contactDistance="3", angleCone="0.01")

    createAndAddToNode(rootNode)
