# -*- coding: utf-8 -*-
from stlib.visuals import ShowGrid
from stlib.physics.rigid import Floor
from stlib.physics.rigid import Cube

def createScene(rootNode):
    """This is my first scene"""
    ShowGrid(rootNode)

    Floor(rootNode,
          withTranslation=[0.0,-160.0,0.0],
          isAStaticObject=True)

    Cube(rootNode,
          withTranslation=[0.0,0.0,0.0],
          withScale=20,
          withColor=[1.0,0.0,0.0])

    return rootNode
