from stlib.scene import MainHeader, ContactHeader
from stlib.physics.rigid import Floor, Cube
from gripper60 import Gripper

def createScene(rootNode):
    """This is my first scene"""
    m=MainHeader(rootNode, gravity=[0.0, -981.0, 0.0], plugins=["SoftRobots"])
    m.getObject("VisualStyle").displayFlags='showForceFields showBehaviorModels showInteractionForceFields'
    ContactHeader(rootNode, alarmDistance=3, contactDistance=2, withFrictionCoef=0.08)

    Gripper(attachedTo=rootNode)
