from stlib.scene import MainHeader
from stlib.visuals import ShowGrid
from stlib.physics.rigid import Floor
from stlib.physics.rigid import Cube

def createScene(rootNode):
    """This is my first scene"""
    MainHeader(rootNode)

    ShowGrid(rootNode)

    Floor(rootNode,
          translation=[0.0,-160.0,0.0],
          isAStaticObject=True)

    Cube(rootNode,
          translation=[0.0,0.0,0.0])


    return rootNode
