### Test du modele bille+labyrinthe qui fonctionne seul

import Sofa
from math import sin,cos,pi

import os
path = os.path.dirname(os.path.abspath(__file__))+'/../details/data/mesh/'
path3D = os.path.dirname(os.path.abspath(__file__))+'/../details/data/mesh2/'
from rigidControl import *

## moi
from stlib.scene import Scene, Interaction, ContactHeader, MainHeader
from stlib.physics.rigid import Sphere, RigidObject
from maze import *
from fixingbox import FixingBox
from splib.objectmodel import SofaPrefab, SofaObject
from splib.numerics import getOrientedBoxFromTransform
from stlib.solver import DefaultSolver
##

def createScene(rootNode):

	MainHeader(rootNode, gravity=[0.0,-9810.0,0.0])
	ContactHeader(rootNode, alarmDistance=5, contactDistance=2)

	maze = Maze(rootNode, translation=[5.0,0.0,0.0], rotation=[-80.0,0.0,0.0])
	maze.createObject('EulerImplicit', name='odesolver')
	maze.createObject('CGLinearSolver', name='Solver')

	# collision model for the maze

	collision=maze.createChild("MazeCollisionModel")
	collision.createObject('MeshSTLLoader', name='loader', filename="data/Maze_Coaster_decimated.stl", triangulate="true")

	collision.createObject('Mesh', name="mesh", src="@loader")
	# CE QUI FAISAIT CRASHER: collision.createObject('Mesh', name="mesh", scr="@loader")
	collision.createObject('MechanicalObject')

	collision.createObject('Triangle')
	collision.createObject('Line')
	collision.createObject('Point')

	collision.createObject('RigidMapping')
	# end collision


	Sphere(rootNode, translation=[0.0,60.0,0.0],
                  uniformScale=1,
                  totalMass=0.0015)


	return rootNode
