# -*- coding: utf-8 -*-
''' ActuatedArm for the tripod robot.

    This model is part of the SoftRobot toolkit available at:
        https://github.com/SofaDefrost/SoftRobots

    Available prefab:
        - ActuatedArm
        - ServoArm
'''
import Sofa

from splib3.numerics import vec3
from splib3.objectmodel import SofaPrefab
from stlib3.visuals import VisualModel
from stlib3.components import addOrientedBoxRoi
from splib3.scenegraph import *
from s90servo import ServoMotor


class ServoArm(Sofa.Prefab):
    '''ServoArm is a reusable sofa model of a servo arm for the S90 servo motor

       Parameters:
            parent:        node where the ServoArm will be attached
            mappingInput:  the rigid mechanical object that will control the orientation of the servo arm
            indexInput: (int) index of the rigid the ServoArm should be mapped to
    '''

    properties = [
        {'name':'name','type':'string', 'help':'Node name','default':'ServoArm'},
        {'name':'mappingInputLink','type':'string',  'help':'the rigid mechanical object that will control the orientation of the servo arm','default':''},
        {'name':'indexInput','type':'int',  'help':'index of the rigid the ServoArm should be mapped to','default':0}]

    def __init__(self, *args, **kwargs):
        Sofa.Prefab.__init__(self, *args, **kwargs)

    def init(self):
        # if not self.mappingInputLink:
        #     Sofa.msg_error("ServoArm", "no mappingInput")
        #     return

        self.addObject('MechanicalObject',
                               name='dofs',
                               size=1,
                               template='Rigid3',
                               showObject=True,
                               showObjectScale=5,
                               translation2=[0, 25, 0])
                               # translation2=[0, 0, 0])
        # mappingInput = getFromRoot(self,self.mappingInputLink.value)
        # print(self.mappingInputLink.value.getLinkPath())
        # self.addObject('RigidRigidMapping',name='mapping', input='@../ServoMotor/ServoWheel/dofs', index=self.indexInput.value)

        # visual = VisualModel(self, '../data/mesh/SG90_servoarm.stl', translation=[0., -25., 0.], color=[1., 1., 1., 0.75])
        # visual.model.writeZTransparent = True
        # visual.addObject('RigidMapping', name='mapping')

    def setRigidMapping(self,path):

        self.addObject('RigidRigidMapping',name='mapping', input=path, index=self.indexInput.value)

        visual = self.addChild(VisualModel(visualMeshPath='../../data/mesh/SG90_servoarm.stl', translation=[0., -25., 0.], color=[1., 1., 1., 0.75]))
        visual.OglModel.writeZTransparent = True
        visual.addObject('RigidMapping', name='mapping')

class ActuatedArm(Sofa.Prefab):
    '''ActuatedArm is a reusable sofa model of a S90 servo motor and the tripod actuation arm.
           Parameters:
             - translation the position in space of the structure
             - eulerRotation the orientation of the structure
             - attachingTo (MechanicalObject)    a rest shape forcefield will constraint the object
                                                 to follow arm position
           Structure:
           Node : {
                name : 'ActuatedArm'
                MechanicalObject     // Rigid position of the motor
                ServoMotor           // The s90 servo motor with its actuated wheel
                ServoArm             // The actuation arm connected to ServoMotor.ServoWheel
            }
    '''
    properties = [
        {'name':'name',                'type':'string', 'help':'Node name',                   'default':'ActuatedArm'},
        {'name':'rotation',            'type':'Vec3d',  'help':'Rotation',                    'default':[0.0, 0.0, 0.0]},
        {'name':'translation',         'type':'Vec3d',  'help':'Translation',                 'default':[0.0, 0.0, 0.0]},
        {'name':'scale',               'type':'Vec3d',  'help':'Scale 3d',                    'default':[1.0, 1.0, 1.0]},
        {'name':'attachingToLink',         'type':'string', 'help':'a rest shape forcefield will constraint the object to follow arm position','default':''}]

    def __init__(self, *args, **kwargs):
        Sofa.Prefab.__init__(self, *args, **kwargs)

    def init(self):

        self.servomotor = self.addChild(ServoMotor(name="ServoMotor",translation=self.translation.value, rotation=self.rotation.value))
        self.servoarm = self.addChild(ServoArm(name="ServoArm"))#,mappingInputLink=self.ServoMotor.ServoWheel.dofs.getLinkPath()))
        self.servoarm.setRigidMapping(self.ServoMotor.ServoWheel.dofs.getLinkPath())

        ## add a public attribute and connect it to the private one.
        self.addData(name='angleIn', group='ArmProperties', help='angle of rotation (in radians) of the arm', type='float', value=0)
        self.ServoMotor.getData('angleIn').setParent(self.getData('angleIn'))

        ## add a public attribute and connect it to the internal one.
        self.addData(name='angleOut', group='ArmProperties', help='angle of rotation (in radians) of the arm', type='float', value=0)
        self.getData('angleOut').setParent(self.ServoMotor.getData('angleOut'))

        if self.attachingToLink :
            attachingTo = getFromRoot(self,self.attachingToLink)
            constraint = self.addConstraint(attachingTo, self.translation.value, self.rotation.value)
            self.attachingTo.addObject('RestShapeSpringsForceField', name='rssff'+self.name,
                                     points=constraint.BoxROI.getData('indices'),
                                     external_rest_shape=constraint.dofs,
                                     stiffness='1e12')

    def addConstraint(self, deformableObject, translation, eulerRotation):
        constraint = self.addChild('Constraint')
        o = addOrientedBoxRoi(constraint, position=deformableObject.dofs.getData('rest_position'),
                              translation=vec3.vadd(translation, [0.0, 25.0, 0.0]),
                              eulerRotation=eulerRotation, scale=[45, 15, 30])
        o.drawSize = 1
        o.drawBoxes = False

        constraint.addObject('TransformEngine', input_position='@BoxROI.pointsInROI',
                                translation=translation, rotation=eulerRotation, inverse=True)

        constraint.addObject('MechanicalObject', name='dofs',
                                template='Vec3', position='@TransformEngine.output_position',
                                showObject=True, showObjectScale=5.0)

        constraint.addObject('RigidMapping', name='mapping', input=self.ServoMotor.ServoWheel.dofs, output='@./')

        return constraint

    def addBox(self, position, translation, eulerRotation):
        constraint = self.addChild('Box')
        o = addOrientedBoxRoi(constraint, position=position,
                              translation=vec3.vadd(translation, [0.0, 25.0, 0.0]),
                              eulerRotation=eulerRotation, scale=[45, 15, 30])
        o.init()


def createScene(rootNode):
    from splib3.animation import animate
    from stlib3.scene import Scene
    import math

    scene = Scene(rootNode)
    scene.VisualStyle.displayFlags = 'showBehavior'
    rootNode.dt = 0.003
    rootNode.gravity = [0., -9810., 0.]

    simulation = rootNode.addChild('Simulation')
    simulation.addObject('EulerImplicitSolver', rayleighStiffness=0.1, rayleighMass=0.1)
    simulation.addObject('CGLinearSolver', name='precond')

    arm = ActuatedArm(simulation, name='ActuatedArm', translation=[0.0, 0.0, 0.0])

    def myanimate(target, factor):
        target.angleIn = math.cos(factor * 2 * math.pi)

    animate(myanimate, {'target': arm.ServoMotor}, duration=5, mode='loop')
