<Node name="root" dt="0.01">

        <Node name="plugins">
                <RequiredPlugin name="Sofa.Component.AnimationLoop"/> <!-- Needed to use components [FreeMotionAnimationLoop] -->
                <RequiredPlugin name="Sofa.Component.Collision.Detection.Algorithm"/> <!-- Needed to use components [BVHNarrowPhase,BruteForceBroadPhase,CollisionPipeline] -->
                <RequiredPlugin name="Sofa.Component.Collision.Detection.Intersection"/> <!-- Needed to use components [LocalMinDistance] -->
                <RequiredPlugin name="Sofa.Component.Collision.Response.Contact"/> <!-- Needed to use components [CollisionResponse] -->
                <RequiredPlugin name="Sofa.Component.Constraint.Lagrangian.Correction"/> <!-- Needed to use components [LinearSolverConstraintCorrection] -->
                <RequiredPlugin name="Sofa.Component.Constraint.Lagrangian.Solver"/> <!-- Needed to use components [BlockGaussSeidelConstraintSolver] -->
                <RequiredPlugin name="Sofa.Component.Engine.Select"/> <!-- Needed to use components [BoxROI] -->
                <RequiredPlugin name="Sofa.Component.Engine.Generate"/>
                <RequiredPlugin name="Sofa.Component.IO.Mesh"/> <!-- Needed to use components [MeshOBJLoader,MeshVTKLoader] -->
                <RequiredPlugin name="Sofa.Component.LinearSolver.Direct"/> <!-- Needed to use components [SparseLDLSolver] -->
                <RequiredPlugin name="Sofa.Component.Mapping.Linear"/> <!-- Needed to use components [BarycentricMapping] -->
                <RequiredPlugin name="Sofa.Component.Mass"/> <!-- Needed to use components [UniformMass] -->
                <RequiredPlugin name="Sofa.Component.IntegrationSchemes.Backward"/> <!-- Needed to use components [EulerImplicitIntegrationScheme] -->
                <RequiredPlugin name="Sofa.Component.SceneUtility"/> <!-- Needed to use components [InfoComponent] -->
                <RequiredPlugin name="Sofa.Component.SolidMechanics.FEM.Elastic"/> <!-- Needed to use components [TetrahedronFEMForceField] -->
                <RequiredPlugin name="Sofa.Component.SolidMechanics.Spring"/> <!-- Needed to use components [RestShapeSpringsForceField] -->
                <RequiredPlugin name="Sofa.Component.StateContainer"/> <!-- Needed to use components [MechanicalObject] -->
                <RequiredPlugin name="Sofa.Component.Topology.Container.Constant"/> <!-- Needed to use components [MeshTopology] -->
                <RequiredPlugin name="Sofa.Component.Topology.Container.Dynamic"/> <!-- Needed to use components [TetrahedronSetTopologyContainer] -->
                <RequiredPlugin name="Sofa.Component.Visual"/> <!-- Needed to use components [VisualStyle] -->
                <RequiredPlugin name="SoftRobots"/>
        </Node>

        <VisualStyle displayFlags='showCollision showVisualModels showForceFields showInteractionForceFields hideCollisionModels hideBoundingCollisionModels hideWireframe'/>


        <FreeMotionAnimationLoop/>
        <CollisionPipeline verbose='0'/>
        <BruteForceBroadPhase name="N2" />
        <BVHNarrowPhase />
        <CollisionResponse response='FrictionContactConstraint'/>
        <LocalMinDistance name="Proximity" alarmDistance='3' contactDistance='0.5'/>
        <BlockGaussSeidelConstraintSolver name="BlockGaussSeidelConstraintSolver" maxIterations='250' printLog='0' tolerance = '0.0000001'/>


        <Node name='bunny'>
                <EulerImplicitIntegrationScheme firstOrder="0"/>
                <SparseLDLSolver />
                <MeshVTKLoader name="loader" filename="mesh/Hollow_Stanford_Bunny.vtu"/>
                <TetrahedronSetTopologyContainer src="@loader"/>
                <MechanicalObject name="tetras" template="Vec3d"/>
                <UniformMass totalMass="0.5"/>
                <TetrahedronFEMForceField youngModulus="18000" poissonRatio='0.3' method='large'/>

                <BoxROI name='ROI1' box='-5 -15 -5  5 -4.5 5' drawBoxes='true'/>
                <RestShapeSpringsForceField points='@ROI1.indices' stiffness='1e12'/>

                <LinearSolverConstraintCorrection/>

                <Node name="cavity">
                        <MeshOBJLoader name="loader" filename='mesh/Hollow_Bunny_Body_Cavity.obj'/>
                        <MeshTopology name="topo" src='@loader'/>
                        <MechanicalObject name="cavity" />

                        <SurfacePressureConstraint  name="SurfacePressureConstraint" value='40' valueType="1"/>
                        <VolumeFromTriangles name="VolumeFromTriangles"/>

                        <BarycentricMapping mapForces="false" mapMasses="false"/>
                </Node>
        </Node>

</Node>
